<?xml version="2.0"?>
<?xml-stylesheet type="text/xsl" href="http://jsbsim.sourceforge.net/JSBSim.xsl"?>


<fdm_config name="WaveRipper" version="2.0" release="Test"
   xmlns:xsi="http://www.w3.org/2001/XMLSchema-instance"
   xsi:noNamespaceSchemaLocation="http://jsbsim.sourceforge.net/JSBSim.xsd">

  <fileheader>
    <author>Minos Park, Rohan Potdar</author>
    <filecreationdate> 04/17/2021 </filecreationdate>
    <version> 1.0 </version>
    <description> Models Phase 1 vehicle based on Initial Stability and Control data. Name is a placeholder. </description>
  </fileheader>

  <metrics>
    <wingarea  unit="M2">     0.290 </wingarea>
    <wingspan  unit="M" >     1.018 </wingspan>
    <wing_incidence unit="DEG"> 0.00 </wing_incidence>
    <chord     unit="M" >     0.416 </chord>
    <htailarea unit="M2">     0.0464 </htailarea>
    <htailarm  unit="M" >     0.21754 </htailarm>
    <vtailarea  unit="M2">    0.0108 </vtailarea>
    <vtailarm  unit="M" >     0.614 </vtailarm>
    <location name="AERORP" unit="M">
      <x>      0.972 </x>
      <y>      0.00 </y>
      <z>      0.00 </z>
    </location>
    <location name="EYEPOINT" unit="M">
      <x>    0.300 </x>
      <y>    0.000 </y>
      <z>    0.000 </z>
    </location>
    <location name="VRP" unit="M">
      <x>     0.0 </x>
      <y>     0.0 </y>
      <z>     0.0 </z>
    </location>
  </metrics>

  <mass_balance>
    <emptywt unit="KG">     12.285 </emptywt>
    <location name="CG" unit="M">
      <x>     1.05 </x>
      <y>     0.00 </y>
      <z>     0.00 </z>
    </location>
    <!-- Outdated Moments -->
    <ixx unit="KG*M2">      0.015 </ixx>
    <iyy unit="KG*M2">      0.893 </iyy>
    <izz unit="KG*M2">      0.908 </izz>
    <!--  -->
  </mass_balance>

  <ground_reactions>
    <contact type="BOGEY" name="NOSE">
      <location unit="M">
        <x>  0.6</x>
        <y>   0</y>
        <z>-0.15</z>
      </location>
      <static_friction>  0.80 </static_friction>
      <dynamic_friction> 0.50 </dynamic_friction>
      <rolling_friction> 0.02 </rolling_friction>
      <spring_coeff unit="LBS/FT">      10.00 </spring_coeff>
      <damping_coeff unit="LBS/FT/SEC">  2.00 </damping_coeff>
      <max_steer unit="DEG"> 45.00 </max_steer>
      <brake_group>NONE</brake_group>
      <retractable>1</retractable>
    </contact>
    <contact type="BOGEY" name="LEFT_MAIN">
      <location unit="M">
        <x> 1.1 </x>
        <y> -0.1 </y>
        <z> -0.15 </z>
      </location>
      <static_friction>  0.80 </static_friction>
      <dynamic_friction> 0.50 </dynamic_friction>
      <rolling_friction> 0.02 </rolling_friction>
      <spring_coeff unit="LBS/FT">      30.00 </spring_coeff>
      <damping_coeff unit="LBS/FT/SEC"> 6.00 </damping_coeff>
      <max_steer unit="DEG">0</max_steer>
      <brake_group>LEFT</brake_group>
      <retractable>1</retractable>
    </contact>
    <contact type="BOGEY" name="RIGHT_MAIN">
      <location unit="M">
        <x> 1.1 </x>
        <y>  0.1 </y>
        <z> -0.15 </z>
      </location>
      <static_friction>  0.80 </static_friction>
      <dynamic_friction> 0.50 </dynamic_friction>
      <rolling_friction> 0.02 </rolling_friction>
      <spring_coeff unit="LBS/FT">      30.00 </spring_coeff>
      <damping_coeff unit="LBS/FT/SEC"> 6.00 </damping_coeff>
      <max_steer unit="DEG">0</max_steer>
      <brake_group>RIGHT</brake_group>
      <retractable>1</retractable>
    </contact>

    <contact type="STRUCTURE" name="NOSE">
      <location unit="M">
        <x> 0 </x>
        <y> 0 </y>
        <z> 0 </z>
      </location>
      <static_friction>  0.80 </static_friction>
      <dynamic_friction> 0.50 </dynamic_friction>
      <spring_coeff unit="LBS/FT">      59.535 </spring_coeff>
      <damping_coeff unit="LBS/FT/SEC"> 11.907 </damping_coeff>
    </contact>
    <contact type="STRUCTURE" name="LEFT_WING">
      <location unit="M">
        <x> 1.3 </x>
        <y> -0.5 </y>
        <z> 0 </z>
      </location>
      <static_friction>  0.80 </static_friction>
      <dynamic_friction> 0.50 </dynamic_friction>
      <spring_coeff unit="LBS/FT">      59.535 </spring_coeff>
      <damping_coeff unit="LBS/FT/SEC"> 11.907 </damping_coeff>
    </contact>
    <contact type="STRUCTURE" name="RIGHT_WING">
      <location unit="M">
        <x> 1.3 </x>
        <y> 0.5 </y>
        <z> 0 </z>
      </location>
      <static_friction>  0.80 </static_friction>
      <dynamic_friction> 0.50 </dynamic_friction>
      <spring_coeff unit="LBS/FT">      59.535 </spring_coeff>
      <damping_coeff unit="LBS/FT/SEC"> 11.907 </damping_coeff>
    </contact>
    <contact type="STRUCTURE" name="TAIL">
      <location unit="M">
        <x> 1.7 </x>
        <y> 0 </y>
        <z> 0 </z>
      </location>
      <static_friction>  0.80 </static_friction>
      <dynamic_friction> 0.50 </dynamic_friction>
      <spring_coeff unit="LBS/FT">      59.535 </spring_coeff>
      <damping_coeff unit="LBS/FT/SEC"> 11.907 </damping_coeff>
    </contact>
  </ground_reactions>

  <aerodynamics>
  </aerodynamics>

  <propulsion>
    <engine file="P300">
      <location unit="M">
        <x>     1.35 </x>
        <y>     0.00 </y>
        <z>     0.00 </z>
      </location>
      <orient unit="DEG">
        <pitch>     0.00 </pitch>
          <roll>     0.00 </roll>
          <yaw>     0.00 </yaw>
      </orient>
      <feed> 0 </feed>

      <thruster file="direct">
        <location unit="M">
          <x>     1.72 </x>
          <y>     0.00 </y>
          <z>     0.00 </z>
        </location>
        <orient unit="DEG">
          <pitch>     0.00 </pitch>
          <roll>     0.00 </roll>
            <yaw>     0.00 </yaw>
        </orient>
      </thruster>
    </engine>

    <tank type="FUEL">
      <location unit="M">
        <x>     0.900 </x>
        <y>     0.000 </y>
        <z>     0.000 </z>
      </location>
      <capacity unit="KG"> 6.00 </capacity>
      <contents unit="KG"> 6.00 </contents>
      <density unit="KG/L"> 0.809 </density>
    </tank>

  </propulsion>

  <system file="fuel"/>

</fdm_config>
